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/batch
! ANSYS input file written by Workbench version 2024 R2
! File used for geometry attach: D:\cup.dsco
/title,wbnew--Steady-State Thermal (A5)
/COM,/COM,     ANSYSMotion, 2024.2
/com,--- Data in consistent NMM units. See Solving Units in the help system for more information.
/units,MPA
/prep7
! Turn off shape checking because checks already performed inside WB mesher.
! See help system for more information.
SHPP,OFF,,NOWARN
etcon,set             ! allow ANSYS to choose best KEYOP's for 180x elements, resets any applicable keyopt to MAPDL defaults
/com,*********** Nodes for the whole assembly ***********
nblock,3,,6286
(1i9,3e20.9e3)
        1    -8.246094703E+00     7.000000000E+00     1.009855348E-15
        2    -4.924493662E+00     7.000000000E+00     6.614184759E+00
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-1
/com,*********** Elements for Body 1 'Default\Solid' ***********
et,1,291
eblock,19,solid,,2808
(19i9)
        1        1        1        1        0        0        0        0       10        0        1      172      186      200      960     2276     2372     2277     2282
     2376     2434
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-1
/com,*********** Send User Defined Coordinate System(s) ***********
csys,0
toffst,273.15,      ! Temperature offset from absolute zero
/com,*********** Send Materials ***********
Temperature = 'TEMP' ! Temperature
MP,DENS,1,9.5e-10,	! tonne mm^-3
MP,ALPX,1,0.00023,	! C^-1
MP,C,1,2300000000,	! mm^2 s^-2 C^-1
MP,KXX,1,0.28,	! tonne mm s^-3 C^-1
MP,EX,1,1100,	! tonne s^-2 mm^-1
MP,NUXY,1,0.42,

!************************* Model Summary ********************
!Default\Solid,	Polyethylene,	matid,	1
!************************* End Model Summary ********************
/com,*********** Define Temperature Constraint ***********
CMBLOCK,_CM44   ,NODE,     1575
(8i10)
         1         2         3         4         5         6         7         8
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fcum,add                   ! add nodal forces up (needed in case have loads on the same edge,vertex)
fcum                       ! reset default on fcum command since done sending WB F loads
/com,*********** Create "Convection" ***********
et,2,152
eblock,10,,,798
(15i9)
     4731        2        2        2        0      315      335      298      298     2893     2831      298     2829
     4732        2        2        2        0      315      298      316      316     2829     2830      316     2892
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-1
esel,s,type,,2
keyop,2,8,2
keyop,2,13,0
esel,all
/com,*********** Create "ToAmbient" Radiation ***********
n,5716,_ASMDIAG*0.5*1,0.,0.
nsel,s,node,,5716
cm,_SPND48,node
nsel,all
et,3,152
keyop,3,5,1         !  Extra node
keyop,3,9,1         !  Use radiation with the form factor real constant
eblock,10,,,332
(15i9)
     5529        3        3        3        0      178      192      400      400     2321     2402      400     2328     5716
     5530        3        3        3        0      169      195      181      181     2255     2345      181     2253     5716
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-1
esel,s,type,,3
mp,emis,3,1.
r,3,1.,5.669e-011
stef,5.669e-011
esel,all
nsel,all
/com,***************** Define Uniform Initial temperature ***************
tunif,22.
fini
/com,****************************************************************************
/com,*************************    SOLUTION       ********************************
/com,****************************************************************************
/solu
antype,0                   ! static analysis
!eqsl,sparse               ! using sparse solver which is default so no eqsl command needed
cntr,print,1               ! print out contact info and also make no initial contact an error
cncheck,dmp		!	Enable program controlled contact splitting for distributed memory parallel run
rescontrol,,none                 ! Do not keep any restart files
dmpoption,emat,no             ! Don't combine emat file for DANSYS
dmpoption,esav,no             ! Don't combine esav file for DANSYS
/com,****************************************************
/com,******************* SOLVE FOR LS 1 OF 1 ****************
d,_CM44,temp,85.
esel,s,type,,2
nsle
sf,all,conv,25000.,22.
nsel,all
esel,all
d,_SPND48,temp,23.
autots,on
nsub,1,10,1
time,1.
outres,erase
outres,all,none
outres,nsol,all
outres,rsol,all
outres,eangl,all
outres,veng,all
outres,fflux,all,
outres,cont,all,
esel,s,type,,2
esel,a,type,,3
cm,_elmisc,elem
esel,all
outres,misc,all,_elmisc
cnvtol,heat,,1.e-003,,1.e-003 ! Program Controlled. Set MINREF equivalent of 1e-6 Watts
! *********** WB SOLVE COMMAND ***********
! check interactive state
*get,ANSINTER_,active,,int
*if,ANSINTER_,ne,0,then
/eof
*endif
solve
/com *************** Write FE CONNECTORS *********
CEWRITE,file,ce,,INTE
/com,****************************************************
/com,*************** FINISHED SOLVE FOR LS 1 *************
/post1
fini
